// COMSOL Multiphysics 5.5.0.359 model "c2.2.mph"
// Outline of the model tree

Geometry
  geom1 "Geometry 1" (2D, length unit m)
    r1: Rectangle | size = {1, 3}
    sq1: Square | pos = {0, 1}
    fin: Finalize "Form Union"

Physics
  ec: ConductiveMedia "Electric Currents" on all domains
    dependent variable V
    cucn1: CurrentConservation (default) | sigma_mat = userdef; sigma = 1; epsilonr_mat = userdef; epsilonr = 1
    ein1: ElectricInsulation (default)
    init1: init "Initial Values 1" (default)
    gnd1: Ground on boundaries 7
    pot1: ElectricPotential on boundaries 2 | V0 = 5
    cucn2: CurrentConservation on domains 2 | sigma_mat = userdef; sigma = 1; epsilonr_mat = userdef; epsilonr = 1

Mesh
  mesh1 "Mesh 1" (physics-controlled)

Studies
  std1 "Study 1"
    stat: Stationary

Solver configurations
  sol1 "Solution 1" (study std1)
    v1: Variables "Dependent Variables 1"
    s1: Stationary "Stationary Solver 1"
      dDef: Direct
      fc1: FullyCoupled | linsolver = dDef

Datasets
  dset1: Solution | solution = sol1

Plots
  pg1: PlotGroup2D "Electric Potential (ec)" | data = dset1
    surf1: Surface | expr = V
    arws1: ArrowSurface | expr = {ec.Jx, ec.Jy}; ynumber = 13
  pg2: PlotGroup2D "2D Plot Group 2" | data = dset1
    surf1: Surface | expr = ec.rhoq; descr = Space charge density
    arws1: ArrowSurface | expr = {ec.Jx, ec.Jy}